// SBML level 2 version 3

model temp()

  // Compartments:
  compartment cell = 1;

  // Species:
  species TGFb_r in cell = TGFb_0; TGFb_r is "TGFb(r)";
  species IL6_r in cell = IL6_0; IL6_r is "IL6(r)";
  species S3 in cell = IL6R_0; S3 is "IL6R(activity~I,l_bind,stat3_site)";
  species S4 in cell = SMAD3_0; S4 is "SMAD3(phos~U,pka_site,smad4_site,stat3_site)";
  species SMAD4_s3_site in cell = SMAD4_0; SMAD4_s3_site is "SMAD4(s3_site)";
  species STAT3m_il6r_site in cell = STAT3m_0; STAT3m_il6r_site is "STAT3m(il6r_site)";
  species PKA_activity_I_s3s4_site in cell = PKA_0; PKA_activity_I_s3s4_site is "PKA(activity~I,s3s4_site)";
  species S8 in cell = 0; S8 is "IL6(r!1).IL6R(activity~I,l_bind!1,stat3_site)";
  species S9 in cell = 0; S9 is "SMAD3(phos~P,pka_site,smad4_site,stat3_site)";
  species S10 in cell = 0; S10 is "IL6(r!1).IL6R(activity~A,l_bind!1,stat3_site)";
  species S11 in cell = 0; S11 is "SMAD3(phos~P,pka_site,smad4_site!1,stat3_site).SMAD4(s3_site!1)";
  species IL6R_internal_bound_il6 in cell = 0; IL6R_internal_bound_il6 is "IL6R_internal(bound_il6)";
  species S13 in cell = 0; S13 is "IL6(r!1).IL6R(activity~A,l_bind!1,stat3_site!2).STAT3m(il6r_site!2)";
  species S14 in cell = 0; S14 is "PKA(activity~A,s3s4_site!1).SMAD3(phos~P,pka_site!1,smad4_site!2,stat3_site).SMAD4(s3_site!2)";
  species pSTAT3m in cell = 0; pSTAT3m is "pSTAT3m()";
  species STAT3d_active_s3_site in cell = 0; STAT3d_active_s3_site is "STAT3d_active(s3_site)";
  species S17 in cell = 0; S17 is "SMAD3(phos~P,pka_site,smad4_site,stat3_site!1).STAT3d_active(s3_site!1)";

  // Parameters:
  TGFb_0 = 1;
  IL6_0 = 0;
  kf_il6_bind = 0.1;
  kr_il6_bind = 0.1;
  k_act_il6r = 1.5;
  k_internalize = 0.03;
  k_recycle = 0.02;
  k_phos_smad3 = 0.1;
  k_dephos_smad3 = 0.05;
  kf_stat3_bind = 0.2;
  Kd_stat3_bind = 0.1;
  k_phos_stat3 = 0.25;
  kf_dimer = 0.8;
  Kd_dimer = 0.5;
  k_dephos_stat3d = 0.05;
  kf_s3s4 = 1;
  Kd_s3s4 = 0.1;
  kf_s3stat3d = 1;
  Kd_s3stat3d = 0.1;
  kf_pka_bind = 1;
  Kd_pka_bind = 0.1;
  IL6R_0 = 150;
  SMAD3_0 = 100;
  SMAD4_0 = 50;
  STAT3m_0 = 150;
  PKA_0 = 50;
  _rateLaw1 = kf_stat3_bind*Kd_stat3_bind;
  _rateLaw2 = kf_dimer*Kd_dimer;
  _rateLaw3 = kf_s3s4*Kd_s3s4;
  _rateLaw4 = kf_s3stat3d*Kd_s3stat3d;
  _rateLaw5 = kf_pka_bind*Kd_pka_bind;

  // Assignment rules:
  Free_TGFb_obs := 0 + TGFb_r;
  IL6R_Active := S10 + S13;
  Free_IL6_obs := 0 + IL6_r;
  pSMAD3_obs := S9 + S11 + S14 + S17;
  pSTAT3_obs := 0 + pSTAT3m;
  STAT3d_active_obs := STAT3d_active_s3_site + S17;
  S3S4_complex_obs := S11 + S14;
  S3STAT3d_complex_obs := 0 + S17;
  PKA_active := 0 + S14;

  // Reactions:
  R1: IL6_r + S3 => S8; kf_il6_bind*IL6_r*S3;
  R2: TGFb_r + S4 => TGFb_r + S9; k_phos_smad3*TGFb_r*S4;
  R3: S8 => IL6_r + S3; kr_il6_bind*S8;
  R4: S8 => S10; k_act_il6r*S8;
  R5: S9 => S4; k_dephos_smad3*S9;
  R6: SMAD4_s3_site + S9 => S11; kf_s3s4*SMAD4_s3_site*S9;
  R7: S10 => IL6R_internal_bound_il6; k_internalize*S10;
  R8: STAT3m_il6r_site + S10 => S13; kf_stat3_bind*STAT3m_il6r_site*S10;
  R9: S11 => SMAD4_s3_site + S9; _rateLaw3*S11;
  R10: PKA_activity_I_s3s4_site + S11 => S14; kf_pka_bind*PKA_activity_I_s3s4_site*S11;
  R11: S13 => STAT3m_il6r_site + IL6R_internal_bound_il6; k_internalize*S13;
  R12: IL6R_internal_bound_il6 => IL6_r + S3; k_recycle*IL6R_internal_bound_il6;
  R13: S13 => STAT3m_il6r_site + S10; _rateLaw1*S13;
  R14: S13 => S10 + pSTAT3m; k_phos_stat3*S13;
  R15: S14 => PKA_activity_I_s3s4_site + S11; _rateLaw5*S14;
  R16: pSTAT3m + pSTAT3m => STAT3d_active_s3_site; 0.5*kf_dimer*pSTAT3m*pSTAT3m;
  R17: STAT3d_active_s3_site => pSTAT3m + pSTAT3m; _rateLaw2*STAT3d_active_s3_site;
  R18: STAT3d_active_s3_site => STAT3m_il6r_site + STAT3m_il6r_site; k_dephos_stat3d*STAT3d_active_s3_site;
  R19: S9 + STAT3d_active_s3_site => S17; kf_s3stat3d*S9*STAT3d_active_s3_site;
  R20: S17 => S9 + STAT3d_active_s3_site; _rateLaw4*S17;

  // Unit definitions:
  unit substance = item;
end
